y_1(x) := sin(0.2*x)
y_2(x) := ln(x^2 - 4*x + 1)
a := 0
b := 10
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h := 2
xr := a, a + h .. b
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h := 3
xv[0] := a
n := (b - a)/h = 3.33333
i := 0 .. n - 1
xv[i + 1] := xv[i] + h
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y_1(x) + y_2(x) → sin(0.2*x) + ln(x^2 - 4*x + 1)
y_1(x) - y_2(x) → sin(0.2*x) - ln(x^2 - 4*x + 1)
y_1(x)*y_2(x) → sin(0.2*x)*ln(x^2 - 4*x + 1)
y_1(x)/y_2(x) → sin(0.2*x)/ln(x^2 - 4*x + 1)
w(x) := y_1(x)
w(x) laplace, x → 0.2/(s^2 + 0.04)
w(x) fourier, x → -3.14159265359i*Δ(ω + 0.2) + 3.14159265359i*Δ(ω - 0.2)
w(x) ztrans, x → 0.198669330795*z/(-1.96013315568*z + z^2 + 1)
d/dx(w(x)) → 0.2*cos(0.2*x)
d^5/dx^5(w(x)) → 0.00032*cos(0.2*x)
integral(w(x), x) → -5.0*cos(0.2*x)
k := 10
n := 4
A := [k/2, n, n + k; 3, k, 2; 1, 2*n, k/5]
A[1, 1] = 10
|A| = 200
AT := transpose(A)
AZ := A^-1
AT = [5, 3, 1; 4, 10, 8; 14, 2, 2]
AZ = [0.02, 0.52, -0.66; -0.02, -0.02, 0.16; 0.07, -0.18, 0.19]
A0 := A[:, 0]
A1 := A[:, 1]
A2 := A[:, 2]
A0 = [5; 3; 1]
A1 = [4; 10; 8]
A2 = [14; 2; 2]
sum(A0) = 9
sum(A1) = 22
sum(A2) = 18
A1*A2 = 92
A1×A2 = [4; 104; -132]
# [component: inputs A]
# [component: inputs A]
